OpenVSP model (file version 5), 19 components.
Geometry view with OpenVSP parameter names; values to 6 digits, angles in degrees, lengths in the model's unit.
Overall bounding box: X_Min=0 X_Len=78.6744 Y_Min=-38.3636 Y_Len=76.7271 Z_Min=-5.64613 Z_Len=22.5189

Fuselage "FuselageA380"
  location (X Y Z) 0 0 0, rotation 0 0 0
  bounding box size 78.6744 8.23408 8.73452
  Design: Length=78.4
  cross sections:
    n  XLocPercent  XRotate   YLocPercent  YRotate  ZLocPercent  shape
    0  0            0         0            0        0            point
    1  0.0299243    0         0            0        0.00259899   ellipse Ellipse_Height=3.88238 Ellipse_Width=4.40089
    2  0.21307      0         0            0        0.0244227    ellipse Ellipse_Height=8.41 Ellipse_Width=7.14
    3  0.647301     0         0            0        0.0244558    ellipse Ellipse_Height=8.56 Ellipse_Width=7.14
    4  0.730352     0         0            0        0.0284209    ellipse Ellipse_Height=7.3 Ellipse_Width=6.72
    5  1            0.642857  0            3.21429  0.045        ellipse Ellipse_Height=1.41 Ellipse_Width=1.15308
    6  1            0.642857  0            3.21429  0.045        point

Wing "AilesA380", child of "FuselageA380"
  location (X Y Z) 25.644 0 -1.88157, rotation 0 0 0
  symmetric about XZ
  bounding box size 20.5233 76.7271 4.48157
  totals: TotalSpan=77.0166 TotalProjectedSpan=76.7235 TotalChord=8.27215 TotalArea=593.156 TotalAR=9.92404 MAC=8.84184
  root: chord 12.8361, twist 1, airfoil file "NASA SC(2)-0414 AIRFOIL"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 BaseThickChord=0.140002 ThickChord=0.140002
  sections:
    n  Span     Root_Chord  Tip_Chord  Area     Sweep  Sweep_Location  Dihedral  Twist  Twist_Location  tip airfoil
    1  14.9755  12.8361     8.84265    162.325  25     0               5         -1.17  0.25            as above
    2  23.5329  8.84265     2.56722    134.253  25     0               5         -1.83  0.25            as above

Custom "Cargo front", child of "FuselageA380"
  location (X Y Z) 7.433 0 -0.907, rotation 0 0 -90; relative location 4.933 0 -0.907, rotation 0 0 -90
  bounding box size 15.349 3.175 1.626
  Design: BoxLayout=0 GapCol=1 GapRow=0.001 Height=1.626 LayoutTrigger=0 Length=3.175 NumCol=1 NumRow=10 SquareFlag=0 Width=1.534
  custom script BoxGroup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

Custom "Cargo back", child of "FuselageA380"
  location (X Y Z) 40.371 0 -0.907, rotation 0 0 -90; relative location 37.871 0 -0.907, rotation 0 0 -90
  bounding box size 10.744 3.175 1.626
  Design: BoxLayout=0 GapCol=1 GapRow=0.001 Height=1.626 LayoutTrigger=0 Length=3.175 NumCol=1 NumRow=7 SquareFlag=0 Width=1.534
  custom script BoxGroup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

Custom "Lower cabin floor", child of "FuselageA380"
  location (X Y Z) 8.6631 0 0.156524, rotation 0 0 0
  bounding box size 39.2826 6.18245 0.01016
  Design: Height=0.01016 Length=39.2826 SquareFlag=0 Width=6.18245
  custom script Box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

Custom "Upper Buisiness Class front", child of "Lower cabin floor"
  location (X Y Z) 8.64639 -2.634 0.2, rotation 0 0 0
  bounding box size 5.17685 5.961 1.11947
  Design: BackAngle=25 BackHeight=1 BackThick=0.1 SeatHeight=0.35 SeatLength=0.5 Width=0.685
  Layout: AisleWidth=0.58 NumLeft=2 NumMiddle=3 NumRight=2 NumRow=5 SeatGap=0.001 SeatPitch=1.05
  custom script SeatGroup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

Custom "Upper Turist class Seats (back)", child of "Lower cabin floor"
  location (X Y Z) 26.9671 -2.815 0.357, rotation 0 0 0
  bounding box size 11.6448 6.259 1.28147
  Design: BackAngle=25 BackHeight=1 BackThick=0.1 SeatHeight=0.35 SeatLength=0.5 Width=0.523
  Layout: AisleWidth=0.51 NumLeft=3 NumMiddle=4 NumRight=3 NumRow=16 SeatGap=0.001 SeatPitch=0.7112
  custom script SeatGroup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

Custom "Upper Turist class Seats (assistent)", child of "Lower cabin floor"
  location (X Y Z) 14.626 -2.815 0.357, rotation 0 0 0
  bounding box size 11.6418 6.262 1.28117
  Design: BackAngle=25 BackHeight=1 BackThick=0.1 SeatHeight=0.35 SeatLength=0.5 Width=0.5233
  Layout: AisleWidth=0.51 NumLeft=3 NumMiddle=4 NumRight=3 NumRow=16 SeatGap=0.001 SeatPitch=0.711
  custom script SeatGroup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

Custom "Upper Turist class Seats (assistent)", child of "Lower cabin floor"
  location (X Y Z) 38.8789 -2.815 0.357, rotation 0 0 0
  bounding box size 8.79785 6.259 1.28147
  Design: BackAngle=25 BackHeight=1 BackThick=0.1 SeatHeight=0.35 SeatLength=0.5 Width=0.523
  Layout: AisleWidth=0.51 NumLeft=3 NumMiddle=4 NumRight=3 NumRow=12 SeatGap=0.001 SeatPitch=0.711
  custom script SeatGroup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

Custom "Upper Cabin floor", child of "FuselageA380"
  location (X Y Z) 8.39238 0 2.42, rotation 0 0 0
  bounding box size 38.7478 6.33699 0.01016
  Design: Height=0.01016 Length=38.7478 SquareFlag=0 Width=6.33699
  custom script Box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

Fuselage "Fueltank", child of "Upper Cabin floor"
  location (X Y Z) 20.1837 0 2.42, rotation 0 0 0
  bounding box size 25.348 6.337 3.52
  Design: Length=25.348
  cross sections:
    n  XLocPercent  YLocPercent  ZLocPercent  shape
    0  0            0            0            edit curve Width=6.337 Height=7.04 AbsoluteFlag=0 SymType=1 cubic Bezier points (X Y): 0.5 0, 0.5 0, 0.276142 0, 0 0, -0.276142 0, -0.5 0, -0.5 0, -0.5 0.276142, -0.2761 0.5, 0 0.5, 0.2761 0.5, 0.5 0.276142, 0.5 0
    1  1            0            0            as above

Fuselage "Fueltank1", child of "Upper Cabin floor"
  location (X Y Z) 15 0 2.42, rotation 0 0 0
  bounding box size 4.9444 6.337 3.52
  Design: Length=4.9444
  cross sections:
    n  XLocPercent  YLocPercent  ZLocPercent  shape
    0  0            0            0            edit curve Width=6.337 Height=7.04 AbsoluteFlag=0 SymType=1 cubic Bezier points (X Y): 0.5 0, 0.5 0, 0.276142 0, 0 0, -0.276142 0, -0.5 0, -0.5 0, -0.5 0.276142, -0.2761 0.5, 0 0.5, 0.2761 0.5, 0.5 0.276142, 0.5 0
    1  1            0            0            as above

Fuselage "Fueltank2", child of "Upper Cabin floor"
  location (X Y Z) 15 0 2.42, rotation 0 0 180
  bounding box size 6.61448 6.337 2.6322
  Design: Length=6.61448
  cross sections:
    n  XLocPercent  YLocPercent  ZLocPercent  shape
    0  0            0            0            edit curve Width=6.337 Height=5.26439 AbsoluteFlag=0 SymType=1 cubic Bezier points (X Y): 0.5 0, 0.5 0, 0.276142 0, 0 0, -0.276142 0, -0.5 0, -0.5 0, -0.5 0.276142, -0.2761 0.5, 0 0.5, 0.2761 0.5, 0.5 0.276142, 0.5 0
    1  1            0            0            as above

Fuselage "Fueltank_back", child of "FuselageA380"
  location (X Y Z) 56.3412 0 2.2282, rotation 0 0 180
  bounding box size 6.3 6.52 7.1
  Design: Length=6.3
  cross sections:
    n  XLocPercent  YLocPercent  ZLocPercent  shape
    0  0            0            0            ellipse Ellipse_Height=7.1 Ellipse_Width=6.52
    1  1            0            0            as above

Custom "Cargo mid", child of "FuselageA380"
  location (X Y Z) 22.773 0 -0.907, rotation 0 0 -90; relative location 20.273 0 -0.907, rotation 0 0 -90
  bounding box size 3.069 3.175 1.626
  Design: BoxLayout=0 GapCol=1 GapRow=0.001 Height=1.626 LayoutTrigger=0 Length=3.175 NumCol=1 NumRow=2 SquareFlag=0 Width=1.534
  custom script BoxGroup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

Wing "VTP HTP"
  location (X Y Z) 64.4019 0 2.65306, rotation 0 0 0
  symmetric about XZ
  bounding box size 10.2682 22.972 1.95057
  totals: TotalSpan=23.1346 TotalProjectedSpan=22.972 TotalChord=5.78366 TotalArea=133.803 TotalAR=3.94397 MAC=6.06103
  root: chord 7.97746, twist 0, NACA 4-series Camber=0 CamberLoc=0.2 ThickChord=0.1
  sections:
    n  Span     Root_Chord  Tip_Chord  Area     Sweep  Sweep_Location  Dihedral  Twist  Twist_Location  tip airfoil
    1  11.5673  7.97746     3.58986    66.9014  30     0               6.79715   0      0.25            as above

Wing "Fin tail", child of "VTP HTP"
  location (X Y Z) 60.4819 0 3.99866, rotation 90 0 0
  bounding box size 17.8684 1.11048 12.8741
  totals: TotalSpan=12.8741 TotalProjectedSpan=12.8741 TotalChord=8.04632 TotalArea=103.589 TotalAR=1.6 MAC=8.43221
  root: chord 11.0984, twist 0, NACA 4-series Camber=0 CamberLoc=0.2 ThickChord=0.1
  sections:
    n  Span     Root_Chord  Tip_Chord  Area     Sweep  Sweep_Location  Dihedral  Twist  Twist_Location  tip airfoil
    1  12.8741  11.0984     4.99427    103.589  45     0               0         0      0.25            as above

Custom "Moteurs internes"
  location (X Y Z) 32.1698 14.9755 -3.08776, rotation 0 0 0
  symmetric about XZ
  bounding box size 4.403 34.998 5.11517
  mass: Density=1 Shell_Flag=0 Mass_Area=1 Mass_Prior=0 PointMass=15098 CGx=0 CGy=0 CGz=0 Ixx=0 Iyy=0 Izz=0 Ixy=0 Ixz=0 Iyz=0
  Design: Camber=0.131818 CamberLoc=0.218182 Chord=4.403 Height=4.022 InvertFlag=0 Shape=-0.055 ThickChord=0.23275 Width=4.022
  custom script Duct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

Mesh "MeshGeom"
  location (X Y Z) 0 0 0, rotation 0 0 0
  bounding box size 78.5271 76.7271 22.4811
  triangle mesh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
