OpenVSP model (file version 5), 35 components.
Geometry view with OpenVSP parameter names; values to 6 digits, angles in degrees, lengths in the model's unit.
Overall bounding box: X_Min=0 X_Len=82.6744 Y_Min=-36.276 Y_Len=72.5521 Z_Min=-5.64613 Z_Len=21.1916

Fuselage "FuselageA380"
  location (X Y Z) 0 0 0, rotation 0 0 0
  bounding box size 82.6744 8.3397 8.84399
  mass: Density=1 Shell_Flag=1 Mass_Area=7 Mass_Prior=0
  Design: Length=82.4
  cross sections:
    n  XLocPercent  XRotate   YLocPercent  YRotate  ZLocPercent  shape
    0  0            0         0            0        0            point
    1  0.0299243    0         0            0        0.00259899   ellipse Ellipse_Height=3.88238 Ellipse_Width=4.40089
    2  0.191327     0         0            0        0.0244227    ellipse Ellipse_Height=8.41 Ellipse_Width=7.14
    3  0.647301     0         0            0        0.0244558    ellipse Ellipse_Height=8.56 Ellipse_Width=7.14
    4  0.730352     0         0            0        0.0284209    ellipse Ellipse_Height=7.3 Ellipse_Width=6.72
    5  1            0.642857  0            3.21429  0.045        ellipse Ellipse_Height=1.41 Ellipse_Width=1.15308
    6  1            0.642857  0            3.21429  0.045        point

Wing "AilesA380", child of "FuselageA380"
  location (X Y Z) 24.6562 0 -1.882, rotation 0 0 0
  symmetric about XZ
  bounding box size 27.9228 72.5521 4.14733
  mass: Density=1 Shell_Flag=1 Mass_Area=12 Mass_Prior=1
  totals: TotalSpan=72.8258 TotalProjectedSpan=72.5487 TotalChord=7.82203 TotalArea=530.36 TotalAR=9.92404 MAC=8.36071
  root: chord 12.1376, twist 1, airfoil file "NACA 0014 Airfoil M=0.0% P=0.0% T=14.0%"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 BaseThickChord=0.140041 ThickChord=0.14
  sections:
    n  Span     Root_Chord  Tip_Chord  Area    Sweep  Sweep_Location  Dihedral  Twist  Twist_Location  tip airfoil
    1  14.1606  12.1376     8.36148    145.14  35     0               5         -1.17  0.25            airfoil file "NACA 0008 Airfoil M=0.0% P=0.0% T=8.0%"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 BaseThickChord=0.0800094 ThickChord=0.0800094
    2  22.2523  8.36148     2.42753    120.04  35     0               5         -1.83  0.25            as above

Custom "Lower cabin floor", child of "FuselageA380"
  location (X Y Z) 5.2577 0 0.156524, rotation 0 0 0
  bounding box size 45 6.18245 0.01016
  Design: Height=0.01016 Length=45 SquareFlag=0 Width=6.18245
  custom script Box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

Custom "Upper Buisiness Class front", child of "Lower cabin floor"
  location (X Y Z) 7.29504 -2.634 0.2, rotation 0 0 0
  bounding box size 5.17685 5.961 1.11947
  Design: BackAngle=25 BackHeight=1 BackThick=0.1 SeatHeight=0.35 SeatLength=0.5 Width=0.685
  Layout: AisleWidth=0.58 NumLeft=2 NumMiddle=3 NumRight=2 NumRow=5 SeatGap=0.001 SeatPitch=1.05
  custom script SeatGroup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

Custom "Upper Turist class Seats (back)", child of "Lower cabin floor"
  location (X Y Z) 26.9671 -2.815 0.357, rotation 0 0 0
  bounding box size 11.6448 6.259 1.28147
  Design: BackAngle=25 BackHeight=1 BackThick=0.1 SeatHeight=0.35 SeatLength=0.5 Width=0.523
  Layout: AisleWidth=0.51 NumLeft=3 NumMiddle=4 NumRight=3 NumRow=16 SeatGap=0.001 SeatPitch=0.7112
  custom script SeatGroup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

Custom "Upper Turist class Seats (assistent)", child of "Lower cabin floor"
  location (X Y Z) 14.626 -2.815 0.357, rotation 0 0 0
  bounding box size 11.6418 6.262 1.28117
  Design: BackAngle=25 BackHeight=1 BackThick=0.1 SeatHeight=0.35 SeatLength=0.5 Width=0.5233
  Layout: AisleWidth=0.51 NumLeft=3 NumMiddle=4 NumRight=3 NumRow=16 SeatGap=0.001 SeatPitch=0.711
  custom script SeatGroup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

Custom "Upper Turist class Seats (assistent)", child of "Lower cabin floor"
  location (X Y Z) 38.8789 -2.815 0.357, rotation 0 0 0
  bounding box size 8.79785 6.259 1.28147
  Design: BackAngle=25 BackHeight=1 BackThick=0.1 SeatHeight=0.35 SeatLength=0.5 Width=0.523
  Layout: AisleWidth=0.51 NumLeft=3 NumMiddle=4 NumRight=3 NumRow=12 SeatGap=0.001 SeatPitch=0.711
  custom script SeatGroup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

Custom "Upper Cabin floor", child of "FuselageA380"
  location (X Y Z) 8 0 2.66, rotation 0 0 0
  bounding box size 50.03 6.33699 0.01016
  Design: Height=0.01016 Length=50.03 SquareFlag=0 Width=6.33699
  custom script Box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

Blank "New Fuel system", child of "Upper Cabin floor"
  location (X Y Z) 14.6076 0 2.66, rotation 0 0 0; relative location 6.60762 0 0, rotation 0 0 0

Fuselage "Fueltank_back", child of "New Fuel system"
  location (X Y Z) 61.171 0 2.2282, rotation 0 0 180
  bounding box size 9.53 6.13 6.13
  mass: Density=70.85 Shell_Flag=0 Mass_Area=0 Mass_Prior=0
  Design: Length=3.4
  cross sections:
    n  XLocPercent  YLocPercent  ZLocPercent  shape
    0  0            0            0            circle Circle_Diameter=6.13
    1  1            0            0            as above

Blank "Side tanks", child of "New Fuel system"
  location (X Y Z) 14.6076 0 2.66, rotation 0 0 0; relative location 0 0 0, rotation 0 0 0

Fuselage "Fuel_cylinder", child of "Side tanks"
  location (X Y Z) 10.4076 2.38616 3.41, rotation 0 0 0; relative location -4.2 2.38616 0.75, rotation 0 0 0
  symmetric about XZ
  bounding box size 5.4375 6.27231 1.5
  mass: Density=70.85 Shell_Flag=0 Mass_Area=1 Mass_Prior=0
  Design: Length=3.9375
  cross sections:
    n  XLocPercent  YLocPercent  ZLocPercent  shape
    0  0            0            0            circle Circle_Diameter=1.5
    1  1            0            0            as above

Fuselage "Fuel_cylinder", child of "Side tanks"
  location (X Y Z) 15.8451 2.38616 3.41, rotation 0 0 0; relative location 1.2375 2.38616 0.75, rotation 0 0 0
  symmetric about XZ
  bounding box size 5.4375 6.27231 1.5
  mass: Density=70.85 Shell_Flag=0 Mass_Area=1 Mass_Prior=0
  Design: Length=3.9375
  cross sections:
    n  XLocPercent  YLocPercent  ZLocPercent  shape
    0  0            0            0            circle Circle_Diameter=1.5
    1  1            0            0            as above

Fuselage "Fuel_cylinder", child of "Side tanks"
  location (X Y Z) 21.2821 2.38616 3.41, rotation 0 0 0; relative location 6.6745 2.38616 0.75, rotation 0 0 0
  symmetric about XZ
  bounding box size 5.4375 6.27231 1.5
  mass: Density=70.85 Shell_Flag=0 Mass_Area=1 Mass_Prior=0
  Design: Length=3.9375
  cross sections:
    n  XLocPercent  YLocPercent  ZLocPercent  shape
    0  0            0            0            circle Circle_Diameter=1.5
    1  1            0            0            as above

Fuselage "Fuel_cylinder", child of "Side tanks"
  location (X Y Z) 26.7201 2.38616 3.41, rotation 0 0 0; relative location 12.1125 2.38616 0.75, rotation 0 0 0
  symmetric about XZ
  bounding box size 5.4375 6.27231 1.5
  mass: Density=70.85 Shell_Flag=0 Mass_Area=1 Mass_Prior=0
  Design: Length=3.9375
  cross sections:
    n  XLocPercent  YLocPercent  ZLocPercent  shape
    0  0            0            0            circle Circle_Diameter=1.5
    1  1            0            0            as above

Fuselage "Fuel_cylinder", child of "Side tanks"
  location (X Y Z) 32.1581 2.38616 3.41, rotation 0 0 0; relative location 17.5505 2.38616 0.75, rotation 0 0 0
  symmetric about XZ
  bounding box size 5.4375 6.27231 1.5
  mass: Density=70.85 Shell_Flag=0 Mass_Area=1 Mass_Prior=0
  Design: Length=3.9375
  cross sections:
    n  XLocPercent  YLocPercent  ZLocPercent  shape
    0  0            0            0            circle Circle_Diameter=1.5
    1  1            0            0            as above

Fuselage "Fuel_cylinder", child of "Side tanks"
  location (X Y Z) 37.5951 2.38616 3.41, rotation 0 0 0; relative location 22.9875 2.38616 0.75, rotation 0 0 0
  symmetric about XZ
  bounding box size 5.4375 6.27231 1.5
  mass: Density=70.85 Shell_Flag=0 Mass_Area=1 Mass_Prior=0
  Design: Length=3.9375
  cross sections:
    n  XLocPercent  YLocPercent  ZLocPercent  shape
    0  0            0            0            circle Circle_Diameter=1.5
    1  1            0            0            as above

Fuselage "Fuel_cylinder", child of "Side tanks"
  location (X Y Z) 43.0326 2.38616 3.41, rotation 0 0 0; relative location 28.425 2.38616 0.75, rotation 0 0 0
  symmetric about XZ
  bounding box size 5.4375 6.27231 1.5
  mass: Density=70.85 Shell_Flag=0 Mass_Area=0 Mass_Prior=0
  Design: Length=3.9375
  cross sections:
    n  XLocPercent  YLocPercent  ZLocPercent  shape
    0  0            0            0            circle Circle_Diameter=1.5
    1  1            0            0            as above

Fuselage "Fuel_cylinder", child of "Side tanks"
  location (X Y Z) 48.4701 2.38616 3.41, rotation 0 0 0; relative location 33.8625 2.38616 0.75, rotation 0 0 0
  symmetric about XZ
  bounding box size 5.4375 6.27231 1.5
  mass: Density=70.85 Shell_Flag=0 Mass_Area=0 Mass_Prior=0
  Design: Length=3.9375
  cross sections:
    n  XLocPercent  YLocPercent  ZLocPercent  shape
    0  0            0            0            circle Circle_Diameter=1.5
    1  1            0            0            as above

Blank "Mid tanks", child of "New Fuel system"
  location (X Y Z) 14.6076 0 2.66, rotation 0 0 0; relative location 0 0 0, rotation 0 0 0

Fuselage "Fuel_cylinder_big", child of "Mid tanks"
  location (X Y Z) 11.4076 0 4.27, rotation 0 0 0; relative location -3.2 0 1.61, rotation 0 0 0
  bounding box size 10.805 3.22 3.22
  mass: Density=70.85 Shell_Flag=0 Mass_Area=0 Mass_Prior=0
  Design: Length=7.585
  cross sections:
    n  XLocPercent  YLocPercent  ZLocPercent  shape
    0  0            0            0            circle Circle_Diameter=3.22
    1  1            0            0            as above

Fuselage "Fuel_cylinder_big", child of "Mid tanks"
  location (X Y Z) 22.2126 0 4.27, rotation 0 0 0; relative location 7.605 0 1.61, rotation 0 0 0
  bounding box size 10.805 3.22 3.22
  mass: Density=70.85 Shell_Flag=0 Mass_Area=0 Mass_Prior=0
  Design: Length=7.585
  cross sections:
    n  XLocPercent  YLocPercent  ZLocPercent  shape
    0  0            0            0            circle Circle_Diameter=3.22
    1  1            0            0            as above

Fuselage "Fuel_cylinder_big", child of "Mid tanks"
  location (X Y Z) 33.0176 0 4.27, rotation 0 0 0; relative location 18.41 0 1.61, rotation 0 0 0
  bounding box size 10.805 3.22 3.22
  mass: Density=70.85 Shell_Flag=0 Mass_Area=0 Mass_Prior=0
  Design: Length=7.585
  cross sections:
    n  XLocPercent  YLocPercent  ZLocPercent  shape
    0  0            0            0            circle Circle_Diameter=3.22
    1  1            0            0            as above

Fuselage "Fuel_cylinder_big", child of "Mid tanks"
  location (X Y Z) 43.8226 0 4.27, rotation 0 0 0; relative location 29.215 0 1.61, rotation 0 0 0
  bounding box size 10.805 3.22 3.22
  mass: Density=70.85 Shell_Flag=0 Mass_Area=0 Mass_Prior=0
  Design: Length=7.585
  cross sections:
    n  XLocPercent  YLocPercent  ZLocPercent  shape
    0  0            0            0            circle Circle_Diameter=3.22
    1  1            0            0            as above

Blank "Cargo", child of "FuselageA380"
  location (X Y Z) 4.933 0 -0.907, rotation 0 0 0

Custom "Cargo front", child of "Cargo"
  location (X Y Z) 6.901 0 -0.907, rotation 0 0 -90; relative location -0.532 0 0, rotation 0 0 -90
  bounding box size 15.349 4.064 1.626
  mass: Density=1 Shell_Flag=1 Mass_Area=0.1 Mass_Prior=0
  Design: BoxLayout=0 GapCol=1 GapRow=0.001 Height=1.626 LayoutTrigger=0 Length=4.064 NumCol=1 NumRow=10 SquareFlag=0 Width=1.534
  custom script BoxGroup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

Custom "Cargo back", child of "Cargo"
  location (X Y Z) 42.4196 0 -0.907, rotation 0 0 -90; relative location 34.9866 0 0, rotation 0 0 -90
  bounding box size 12.279 4.064 1.626
  mass: Density=1 Shell_Flag=0 Mass_Area=0.1 Mass_Prior=0
  Design: BoxLayout=0 GapCol=1 GapRow=0.001 Height=1.626 LayoutTrigger=0 Length=4.064 NumCol=1 NumRow=8 SquareFlag=0 Width=1.534
  custom script BoxGroup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

Custom "Cargo mid", child of "Cargo"
  location (X Y Z) 22.2595 0 -0.907, rotation 0 0 -90; relative location 14.8265 0 0, rotation 0 0 -90
  bounding box size 6.139 3.175 1.626
  mass: Density=1 Shell_Flag=0 Mass_Area=0.1 Mass_Prior=0
  Design: BoxLayout=0 GapCol=1 GapRow=0.001 Height=1.626 LayoutTrigger=0 Length=3.175 NumCol=1 NumRow=4 SquareFlag=0 Width=1.534
  custom script BoxGroup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

Fuselage "Cargo_total_front", child of "Cargo"
  location (X Y Z) 6.433 0 -0.907, rotation 0 0 0; relative location 1.5 0 0, rotation 0 0 0
  bounding box size 16.874 4.064 1.626
  Design: Length=16.874
  cross sections:
    n  XLocPercent  YLocPercent  ZLocPercent  shape
    0  0            0            0            edit curve Width=3.175 Height=1.626 AbsoluteFlag=0 SymType=1 linear points (X Y): 0.57 0, 0.5 -0.5, 0 -0.5, -0.5 -0.5, -0.57 0, -0.64 0.5, 0 0.5, 0.64 0.5, 0.57 0
    1  1            0            0            as above

Fuselage "Cargo_total_back", child of "Cargo"
  location (X Y Z) 38.1815 0 -0.907, rotation 0 0 0; relative location 33.2485 0 0, rotation 0 0 0
  bounding box size 16.874 4.064 1.626
  Design: Length=16.874
  cross sections:
    n  XLocPercent  YLocPercent  ZLocPercent  shape
    0  0            0            0            edit curve Width=3.175 Height=1.626 AbsoluteFlag=0 SymType=1 linear points (X Y): 0.57 0, 0.5 -0.5, 0 -0.5, -0.5 -0.5, -0.57 0, -0.64 0.5, 0 0.5, 0.64 0.5, 0.57 0
    1  1            0            0            as above

Wing "VTP HTP"
  location (X Y Z) 68.7503 0 2.65306, rotation 0 0 0
  symmetric about XZ
  bounding box size 11.9252 20.6037 1.74948
  mass: Density=1 Shell_Flag=1 Mass_Area=10 Mass_Prior=1
  totals: TotalSpan=20.7495 TotalProjectedSpan=20.6037 TotalChord=5.18739 TotalArea=107.636 TotalAR=3.94397 MAC=5.43617
  root: chord 7.15501, twist 0, NACA 4-series Camber=0 CamberLoc=0.2 ThickChord=0.1
  sections:
    n  Span     Root_Chord  Tip_Chord  Area     Sweep  Sweep_Location  Dihedral  Twist  Twist_Location  tip airfoil
    1  10.3748  7.15501     3.21976    53.8179  40     0               6.79715   0      0.25            as above
  SS_Control "Horizontal tail CS": UStart=0.4 UEnd=0.6 Length_C_Start=0.25 Length_C_End=0.25 Length_Start=1.59199 Length_End=1.0017 LE_Flag=0 Surf_Type=2

Wing "Fin tail", child of "VTP HTP"
  location (X Y Z) 64.6303 0 3.99866, rotation 90 0 0
  bounding box size 16.0262 0.995995 11.5468
  mass: Density=1 Shell_Flag=1 Mass_Area=10 Mass_Prior=1
  totals: TotalSpan=11.5468 TotalProjectedSpan=11.5468 TotalChord=7.21678 TotalArea=83.331 TotalAR=1.6 MAC=7.56288
  root: chord 9.95417, twist 0, NACA 4-series Camber=0 CamberLoc=0.2 ThickChord=0.1
  sections:
    n  Span     Root_Chord  Tip_Chord  Area    Sweep  Sweep_Location  Dihedral  Twist  Twist_Location  tip airfoil
    1  11.5468  9.95417     4.47938    83.331  45     0               0         0      0.25            as above
  SS_Control "Vertcal tail CS": UStart=0.4 UEnd=0.6 Length_C_Start=0.25 Length_C_End=0.25 Length_Start=2.2148 Length_End=1.39358 LE_Flag=0 Surf_Type=2

Custom "Moteurs internes"
  location (X Y Z) 33.5211 14.9755 -3.08776, rotation 0 0 0
  symmetric about XZ
  bounding box size 4.403 34.998 5.11517
  mass: Density=1 Shell_Flag=0 Mass_Area=0 Mass_Prior=1 PointMass=7549 CGx=0 CGy=0 CGz=0 Ixx=0 Iyy=0 Izz=0 Ixy=0 Ixz=0 Iyz=0
  Design: Camber=0.131818 CamberLoc=0.218182 Chord=4.403 Height=4.022 InvertFlag=0 Shape=-0.055 ThickChord=0.23275 Width=4.022
  custom script Duct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

Blank "Cg"
  location (X Y Z) 31.502 0 1.309, rotation 0 0 0

Mesh "MeshGeom"
  location (X Y Z) 0 0 0, rotation 0 0 0
  bounding box size 82.5271 72.5521 18.2935
  triangle mesh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

VSPAERO settings (reference component "AilesA380"): Sref=530.36 bref=72.8258 cref=7.82203 Xcg=28.4241 Ycg=-1.97803e-07 Zcg=1.39012 AlphaStart=0 AlphaEnd=25 AlphaNpts=3 BetaStart=0 BetaEnd=0 BetaNpts=1 MachStart=0.85 MachEnd=0 MachNpts=1 ReCref=1e+07 Vinf=100 Rho=0.002377
