OpenVSP model (file version 5), 36 components.
Geometry view with OpenVSP parameter names; values to 6 digits, angles in degrees, lengths in the model's unit.
Overall bounding box: X_Min=-65.9375 X_Len=151.875 Y_Min=-75.9375 Y_Len=151.875 Z_Min=-8.27027 Z_Len=24.333

Fuselage "Fuselage"
  location (X Y Z) 0 0 0, rotation 0 0 0
  bounding box size 82.6744 8.3397 8.84399
  mass: Density=1 Shell_Flag=1 Mass_Area=26.16 Mass_Prior=0
  Design: Length=82.4
  cross sections:
    n  XLocPercent  XRotate   YLocPercent  YRotate  ZLocPercent  shape
    0  0            0         0            0        0            point
    1  0.0299243    0         0            0        0.00259899   ellipse Ellipse_Height=3.88238 Ellipse_Width=4.40089
    2  0.197561     0         0            0        0.0244227    ellipse Ellipse_Height=8.41 Ellipse_Width=7.14
    3  0.667029     0         0            0        0.0244558    ellipse Ellipse_Height=8.56 Ellipse_Width=7.14
    4  0.75008      0         0            0        0.0284209    ellipse Ellipse_Height=7.3 Ellipse_Width=6.72
    5  1            0.642857  0            3.21429  0.045        ellipse Ellipse_Height=1.41 Ellipse_Width=1.15308
    6  1            0.642857  0            3.21429  0.045        point

Custom "Lower cabin floor", child of "Fuselage"
  location (X Y Z) 6.34465 0 0.156524, rotation 0 0 0
  bounding box size 48.7273 6.18245 0.01016
  Design: Height=0.01016 Length=48.7273 SquareFlag=0 Width=6.18245
  custom script Box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

Custom "Upper Buisiness Class front", child of "Lower cabin floor"
  location (X Y Z) 7.29504 -2.634 0.2, rotation 0 0 0
  bounding box size 5.17685 5.961 1.11947
  Design: BackAngle=25 BackHeight=1 BackThick=0.1 SeatHeight=0.35 SeatLength=0.5 Width=0.685
  Layout: AisleWidth=0.58 NumLeft=2 NumMiddle=3 NumRight=2 NumRow=5 SeatGap=0.001 SeatPitch=1.05
  custom script SeatGroup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

Custom "Upper Turist class Seats (back)", child of "Lower cabin floor"
  location (X Y Z) 26.9671 -2.815 0.357, rotation 0 0 0
  bounding box size 11.6448 6.259 1.28147
  Design: BackAngle=25 BackHeight=1 BackThick=0.1 SeatHeight=0.35 SeatLength=0.5 Width=0.523
  Layout: AisleWidth=0.51 NumLeft=3 NumMiddle=4 NumRight=3 NumRow=16 SeatGap=0.001 SeatPitch=0.7112
  custom script SeatGroup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

Custom "Upper Turist class Seats (assistent)", child of "Lower cabin floor"
  location (X Y Z) 14.626 -2.815 0.357, rotation 0 0 0
  bounding box size 11.6418 6.262 1.28117
  Design: BackAngle=25 BackHeight=1 BackThick=0.1 SeatHeight=0.35 SeatLength=0.5 Width=0.5233
  Layout: AisleWidth=0.51 NumLeft=3 NumMiddle=4 NumRight=3 NumRow=16 SeatGap=0.001 SeatPitch=0.711
  custom script SeatGroup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

Custom "Upper Turist class Seats (assistent)", child of "Lower cabin floor"
  location (X Y Z) 38.8789 -2.815 0.357, rotation 0 0 0
  bounding box size 8.79785 6.259 1.28147
  Design: BackAngle=25 BackHeight=1 BackThick=0.1 SeatHeight=0.35 SeatLength=0.5 Width=0.523
  Layout: AisleWidth=0.51 NumLeft=3 NumMiddle=4 NumRight=3 NumRow=12 SeatGap=0.001 SeatPitch=0.711
  custom script SeatGroup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

Box "PAx_weigth", child of "Lower cabin floor"
  location (X Y Z) 6.34465 0 0.808698, rotation 0 0 0; relative location 0 0 0.652174, rotation 0 0 0
  bounding box size 47.6313 6.02792 1.18273
  mass: Density=0 Shell_Flag=0 Mass_Area=0 Mass_Prior=0 PointMass=65257.8 CGx=0 CGy=0 CGz=0 Ixx=0 Iyy=0 Izz=0 Ixy=0 Ixz=0 Iyz=0
  Design: Height=1.18273 Length=47.6313 SquareFlag=0 Width=6.02792
  custom script Box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

Custom "Upper Cabin floor", child of "Fuselage"
  location (X Y Z) 8 0 2.66, rotation 0 0 0
  bounding box size 46.03 6.33699 0.01016
  Design: Height=0.01016 Length=46.03 SquareFlag=0 Width=6.33699
  custom script Box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

Blank "New Fuel system", child of "Upper Cabin floor"
  location (X Y Z) 14.6076 0 2.66, rotation 0 0 0; relative location 6.60762 0 0, rotation 0 0 0

Fuselage "Fueltank_back", child of "New Fuel system"
  location (X Y Z) 61.171 0 2.2282, rotation 0 0 180
  bounding box size 10.13 6.13 6.13
  mass: Density=0 Shell_Flag=0 Mass_Area=0 Mass_Prior=0 PointMass=16909.1 CGx=2 CGy=0 CGz=0 Ixx=0 Iyy=0 Izz=0 Ixy=0 Ixz=0 Iyz=0
  Design: Length=4
  cross sections:
    n  XLocPercent  YLocPercent  ZLocPercent  shape
    0  0            0            0            circle Circle_Diameter=6.13
    1  1            0            0            as above

Blank "Side tanks", child of "New Fuel system"
  location (X Y Z) 14.6076 0 2.66, rotation 0 0 0; relative location 0 0 0, rotation 0 0 0

Fuselage "Fuel_cylinder", child of "Side tanks"
  location (X Y Z) 10.4076 2.38616 3.41, rotation 0 0 0; relative location -4.2 2.38616 0.75, rotation 0 0 0
  symmetric about XZ
  bounding box size 5.4375 6.27231 1.5
  mass: Density=0 Shell_Flag=0 Mass_Area=1 Mass_Prior=0 PointMass=618.186 CGx=1.96875 CGy=0 CGz=0 Ixx=0 Iyy=0 Izz=0 Ixy=0 Ixz=0 Iyz=0
  Design: Length=3.9375
  cross sections:
    n  XLocPercent  YLocPercent  ZLocPercent  shape
    0  0            0            0            circle Circle_Diameter=1.5
    1  1            0            0            as above

Fuselage "Fuel_cylinder", child of "Side tanks"
  location (X Y Z) 15.8451 2.38616 3.41, rotation 0 0 0; relative location 1.2375 2.38616 0.75, rotation 0 0 0
  symmetric about XZ
  bounding box size 5.4375 6.27231 1.5
  mass: Density=0 Shell_Flag=0 Mass_Area=1 Mass_Prior=0 PointMass=618.186 CGx=1.96875 CGy=0 CGz=0 Ixx=0 Iyy=0 Izz=0 Ixy=0 Ixz=0 Iyz=0
  Design: Length=3.9375
  cross sections:
    n  XLocPercent  YLocPercent  ZLocPercent  shape
    0  0            0            0            circle Circle_Diameter=1.5
    1  1            0            0            as above

Fuselage "Fuel_cylinder", child of "Side tanks"
  location (X Y Z) 21.2821 2.38616 3.41, rotation 0 0 0; relative location 6.6745 2.38616 0.75, rotation 0 0 0
  symmetric about XZ
  bounding box size 5.4375 6.27231 1.5
  mass: Density=0 Shell_Flag=0 Mass_Area=1 Mass_Prior=0 PointMass=618.186 CGx=1.96875 CGy=0 CGz=0 Ixx=0 Iyy=0 Izz=0 Ixy=0 Ixz=0 Iyz=0
  Design: Length=3.9375
  cross sections:
    n  XLocPercent  YLocPercent  ZLocPercent  shape
    0  0            0            0            circle Circle_Diameter=1.5
    1  1            0            0            as above

Fuselage "Fuel_cylinder", child of "Side tanks"
  location (X Y Z) 26.7201 2.38616 3.41, rotation 0 0 0; relative location 12.1125 2.38616 0.75, rotation 0 0 0
  symmetric about XZ
  bounding box size 5.4375 6.27231 1.5
  mass: Density=0 Shell_Flag=0 Mass_Area=1 Mass_Prior=0 PointMass=618.186 CGx=1.96875 CGy=0 CGz=0 Ixx=0 Iyy=0 Izz=0 Ixy=0 Ixz=0 Iyz=0
  Design: Length=3.9375
  cross sections:
    n  XLocPercent  YLocPercent  ZLocPercent  shape
    0  0            0            0            circle Circle_Diameter=1.5
    1  1            0            0            as above

Fuselage "Fuel_cylinder", child of "Side tanks"
  location (X Y Z) 32.1581 2.38616 3.41, rotation 0 0 0; relative location 17.5505 2.38616 0.75, rotation 0 0 0
  symmetric about XZ
  bounding box size 5.4375 6.27231 1.5
  mass: Density=0 Shell_Flag=0 Mass_Area=1 Mass_Prior=0 PointMass=618.186 CGx=1.96875 CGy=0 CGz=0 Ixx=0 Iyy=0 Izz=0 Ixy=0 Ixz=0 Iyz=0
  Design: Length=3.9375
  cross sections:
    n  XLocPercent  YLocPercent  ZLocPercent  shape
    0  0            0            0            circle Circle_Diameter=1.5
    1  1            0            0            as above

Fuselage "Fuel_cylinder", child of "Side tanks"
  location (X Y Z) 37.5951 2.38616 3.41, rotation 0 0 0; relative location 22.9875 2.38616 0.75, rotation 0 0 0
  symmetric about XZ
  bounding box size 5.4375 6.27231 1.5
  mass: Density=0 Shell_Flag=0 Mass_Area=1 Mass_Prior=0 PointMass=618.186 CGx=1.96875 CGy=0 CGz=0 Ixx=0 Iyy=0 Izz=0 Ixy=0 Ixz=0 Iyz=0
  Design: Length=3.9375
  cross sections:
    n  XLocPercent  YLocPercent  ZLocPercent  shape
    0  0            0            0            circle Circle_Diameter=1.5
    1  1            0            0            as above

Fuselage "Fuel_cylinder", child of "Side tanks"
  location (X Y Z) 43.0326 2.38616 3.41, rotation 0 0 0; relative location 28.425 2.38616 0.75, rotation 0 0 0
  symmetric about XZ
  bounding box size 5.4375 6.27231 1.5
  mass: Density=0 Shell_Flag=0 Mass_Area=0 Mass_Prior=0 PointMass=618.186 CGx=1.96875 CGy=0 CGz=0 Ixx=0 Iyy=0 Izz=0 Ixy=0 Ixz=0 Iyz=0
  Design: Length=3.9375
  cross sections:
    n  XLocPercent  YLocPercent  ZLocPercent  shape
    0  0            0            0            circle Circle_Diameter=1.5
    1  1            0            0            as above

Fuselage "Fuel_cylinder", child of "Side tanks"
  location (X Y Z) 48.4701 2.38616 3.41, rotation 0 0 0; relative location 33.8625 2.38616 0.75, rotation 0 0 0
  symmetric about XZ
  bounding box size 5.4375 6.27231 1.5
  mass: Density=0 Shell_Flag=0 Mass_Area=0 Mass_Prior=0 PointMass=618.186 CGx=1.96875 CGy=0 CGz=0 Ixx=0 Iyy=0 Izz=0 Ixy=0 Ixz=0 Iyz=0
  Design: Length=3.9375
  cross sections:
    n  XLocPercent  YLocPercent  ZLocPercent  shape
    0  0            0            0            circle Circle_Diameter=1.5
    1  1            0            0            as above

Blank "Mid tanks", child of "New Fuel system"
  location (X Y Z) 14.6076 0 2.66, rotation 0 0 0; relative location 0 0 0, rotation 0 0 0

Fuselage "Fuel_cylinder_big", child of "Mid tanks"
  location (X Y Z) 11.4076 0 4.27, rotation 0 0 0; relative location -3.2 0 1.61, rotation 0 0 0
  bounding box size 10.805 3.22 3.22
  mass: Density=0 Shell_Flag=0 Mass_Area=0 Mass_Prior=0 PointMass=5614.73 CGx=3.7925 CGy=0 CGz=0 Ixx=0 Iyy=0 Izz=0 Ixy=0 Ixz=0 Iyz=0
  Design: Length=7.585
  cross sections:
    n  XLocPercent  YLocPercent  ZLocPercent  shape
    0  0            0            0            circle Circle_Diameter=3.22
    1  1            0            0            as above

Fuselage "Fuel_cylinder_big", child of "Mid tanks"
  location (X Y Z) 22.2126 0 4.27, rotation 0 0 0; relative location 7.605 0 1.61, rotation 0 0 0
  bounding box size 10.805 3.22 3.22
  mass: Density=0 Shell_Flag=0 Mass_Area=0 Mass_Prior=0 PointMass=5614.73 CGx=3.7925 CGy=0 CGz=0 Ixx=0 Iyy=0 Izz=0 Ixy=0 Ixz=0 Iyz=0
  Design: Length=7.585
  cross sections:
    n  XLocPercent  YLocPercent  ZLocPercent  shape
    0  0            0            0            circle Circle_Diameter=3.22
    1  1            0            0            as above

Fuselage "Fuel_cylinder_big", child of "Mid tanks"
  location (X Y Z) 33.0176 0 4.27, rotation 0 0 0; relative location 18.41 0 1.61, rotation 0 0 0
  bounding box size 10.805 3.22 3.22
  mass: Density=0 Shell_Flag=0 Mass_Area=0 Mass_Prior=0 PointMass=5614.73 CGx=3.7925 CGy=0 CGz=0 Ixx=0 Iyy=0 Izz=0 Ixy=0 Ixz=0 Iyz=0
  Design: Length=7.585
  cross sections:
    n  XLocPercent  YLocPercent  ZLocPercent  shape
    0  0            0            0            circle Circle_Diameter=3.22
    1  1            0            0            as above

Fuselage "Fuel_cylinder_big", child of "Mid tanks"
  location (X Y Z) 43.8226 0 4.27, rotation 0 0 0; relative location 29.215 0 1.61, rotation 0 0 0
  bounding box size 10.805 3.22 3.22
  mass: Density=0 Shell_Flag=0 Mass_Area=0 Mass_Prior=0 PointMass=5614.73 CGx=3.7925 CGy=0 CGz=0 Ixx=0 Iyy=0 Izz=0 Ixy=0 Ixz=0 Iyz=0
  Design: Length=7.585
  cross sections:
    n  XLocPercent  YLocPercent  ZLocPercent  shape
    0  0            0            0            circle Circle_Diameter=3.22
    1  1            0            0            as above

Box "cockpit", child of "Upper Cabin floor"
  location (X Y Z) 5.28261 0 2.7687, rotation 0 0 0; relative location -2.71739 0 0.108696, rotation 0 0 0
  bounding box size 3.03485 3.55534 1.53725
  mass: Density=0 Shell_Flag=0 Mass_Area=0 Mass_Prior=0
  Design: Height=1.53725 Length=3.03485 SquareFlag=0 Width=3.55534
  custom script Box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

Blank "Cargo", child of "Fuselage"
  location (X Y Z) 4.933 0 -0.907, rotation 0 0 0

Fuselage "Cargo_total_front", child of "Cargo"
  location (X Y Z) 5.85923 0 -0.86, rotation 0 0 0; relative location 0.92623 0 0.047, rotation 0 0 0
  bounding box size 18.408 4.064 1.626
  mass: Density=1 Shell_Flag=0 Mass_Area=0 Mass_Prior=0 PointMass=5608.7 CGx=0 CGy=0 CGz=0 Ixx=0 Iyy=0 Izz=0 Ixy=0 Ixz=0 Iyz=0
  Design: Length=18.408
  cross sections:
    n  XLocPercent  YLocPercent  ZLocPercent  shape
    0  0            0            0            edit curve Width=3.175 Height=1.626 AbsoluteFlag=0 SymType=1 linear points (X Y): 0.57 0, 0.5 -0.5, 0 -0.5, -0.5 -0.5, -0.57 0, -0.64 0.5, 0 0.5, 0.64 0.5, 0.57 0
    1  1            0            0            as above

Fuselage "Cargo_total_back", child of "Cargo"
  location (X Y Z) 38.1815 0 -0.86, rotation 0 0 0; relative location 33.2485 0 0.047, rotation 0 0 0
  bounding box size 16.874 4.064 1.626
  mass: Density=1 Shell_Flag=0 Mass_Area=0 Mass_Prior=0 PointMass=5141.3 CGx=0 CGy=0 CGz=0 Ixx=0 Iyy=0 Izz=0 Ixy=0 Ixz=0 Iyz=0
  Design: Length=16.874
  cross sections:
    n  XLocPercent  YLocPercent  ZLocPercent  shape
    0  0            0            0            edit curve Width=3.175 Height=1.626 AbsoluteFlag=0 SymType=1 linear points (X Y): 0.57 0, 0.5 -0.5, 0 -0.5, -0.5 -0.5, -0.57 0, -0.64 0.5, 0 0.5, 0.64 0.5, 0.57 0
    1  1            0            0            as above

Wing "Main_wings", child of "Fuselage"
  location (X Y Z) 25.6085 0 -1.882, rotation 0 0 0
  symmetric about XZ
  bounding box size 27.2988 70.9533 4.01595
  mass: Density=1 Shell_Flag=1 Mass_Area=53.41 Mass_Prior=0
  totals: TotalSpan=71.2004 TotalProjectedSpan=70.9295 TotalChord=7.12004 TotalArea=506.95 TotalAR=9.92404 MAC=8.1737
  root: chord 11.8667, twist 1, airfoil file "NASA SC(2)-0412 AIRFOIL"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 BaseThickChord=0.120007 ThickChord=0.120007
  sections:
    n  Span     Root_Chord  Tip_Chord  Area     Sweep  Sweep_Location  Dihedral  Twist  Twist_Location  tip airfoil
    1  35.6002  11.8667     2.37335    253.475  35     0               5         -3     0.25            as above

Wing "Horizontal tail"
  location (X Y Z) 66.3998 0 2.65306, rotation 0 0 0
  symmetric about XZ
  bounding box size 11.5282 19.9178 1.83047
  mass: Density=1 Shell_Flag=1 Mass_Area=29.43 Mass_Prior=1
  totals: TotalSpan=20.0588 TotalProjectedSpan=19.9178 TotalChord=5.01469 TotalArea=100.589 TotalAR=3.94397 MAC=5.25519
  root: chord 6.91681, twist 0, NACA 4-series Camber=0 CamberLoc=0.2 ThickChord=0.14
  sections:
    n  Span     Root_Chord  Tip_Chord  Area     Sweep  Sweep_Location  Dihedral  Twist  Twist_Location  tip airfoil
    1  10.0294  6.91681     3.11257    50.2943  40     0               6.79715   0      0.25            NACA 4-series Camber=0 CamberLoc=0.2 ThickChord=0.1
  SS_Control "Elevator": UStart=0.375 UEnd=0.45 Length_C_Start=0.25 Length_C_End=0.25 Length_Start=1.61032 Length_End=1.39633 LE_Flag=0 Surf_Type=2
  SS_Control "Stabalizer": UStart=0.45 UEnd=0.62 Length_C_Start=0.25 Length_C_End=0.25 Length_Start=1.39633 Length_End=0.911291 LE_Flag=0 Surf_Type=2

Wing "Vertical tail", child of "Horizontal tail"
  location (X Y Z) 66.3998 0 4.9003, rotation 90 0 0
  bounding box size 15.4927 1.3476 11.1624
  mass: Density=1 Shell_Flag=1 Mass_Area=29.43 Mass_Prior=1
  totals: TotalSpan=11.1624 TotalProjectedSpan=11.1624 TotalChord=6.97652 TotalArea=77.875 TotalAR=1.6 MAC=7.31111
  root: chord 9.62279, twist 0, NACA 4-series Camber=0 CamberLoc=0.2 ThickChord=0.14
  sections:
    n  Span     Root_Chord  Tip_Chord  Area    Sweep  Sweep_Location  Dihedral  Twist  Twist_Location  tip airfoil
    1  11.1624  9.62279     4.33026    77.875  45     0               0         0      0.25            NACA 4-series Camber=0 CamberLoc=0.2 ThickChord=0.1
  SS_Control "Rudder": UStart=0.323529 UEnd=0.45 Length_C_Start=0.32 Length_C_End=0.32 Length_Start=3.07929 Length_End=2.48653 LE_Flag=0 Surf_Type=2
  SS_Control "Stabilzer": UStart=0.45 UEnd=0.667 Length_C_Start=0.32 Length_C_End=0.32 Length_Start=2.48653 Length_End=1.38568 LE_Flag=0 Surf_Type=2

Custom "Trent XWB-97 Nacelles"
  location (X Y Z) 33.5846 14.9755 -3.30515, rotation 0 0 0
  symmetric about XZ
  bounding box size 6.06596 34.5972 4.70914
  mass: Density=0 Shell_Flag=0 Mass_Area=0 Mass_Prior=2 PointMass=9813.7 CGx=0 CGy=0 CGz=0 Ixx=0 Iyy=0 Izz=0 Ixy=0 Ixz=0 Iyz=0
  Design: Camber=0.020362 CamberLoc=0.144796 Chord=6.06 Height=3.94 InvertFlag=0 Shape=-0.055 ThickChord=0.155578 Width=3.94
  custom script Duct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

Pod "PodGeom", child of "Trent XWB-97 Nacelles"
  location (X Y Z) 33.5846 14.9755 -1.02254, rotation 0 0 0; relative location 0 0 2.28261, rotation 0 0 0
  symmetric about XZ
  bounding box size 10 31.2842 1.33333
  Design: FineRatio=15 Length=10

Blank "Cg"
  location (X Y Z) 31.502 0 1.309, rotation 0 0 0

Custom "Disk"
  location (X Y Z) 10 0 -8.27027, rotation 0 90 0
  bounding box size 151.875 151.875 0
  Design: Diameter=151.875
  custom script Disk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

Mesh "MeshGeom"
  location (X Y Z) 0 0 0, rotation 0 0 0
  bounding box size 82.5271 70.9532 18.6854
  triangle mesh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

VSPAERO settings: Sref=530.36 bref=72.8258 cref=7.82203 Xcg=28.4241 Ycg=-1.97803e-07 Zcg=1.39012 AlphaStart=0 AlphaEnd=25 AlphaNpts=3 BetaStart=0 BetaEnd=0 BetaNpts=1 MachStart=0.85 MachEnd=0 MachNpts=1 ReCref=1e+07 Vinf=100 Rho=0.002377
